// COMSOL Multiphysics 5.5.0.359 model "TestCase3.mph"
// Outline of the model tree

Geometry
  geom1 "Plane capacitor" (2D, length unit m)
    r1: Rectangle "External medium" | size = {0.08, 0.04}
    r2: Rectangle "Internal medium" | pos = {0.03, 0.01}; size = {0.02, 0.02}
    fin: Finalize "Form Union"

Materials
  mat1: Common "External material" on domains 1
    def "Basic"
      relpermittivity = 1
  mat2: Common "Internal material" on domains 2
    def "Basic"
      relpermittivity = 16

Physics
  es: Electrostatics on all domains
    dependent variable V
    ShapeProperty.order_electricpotential = 1
    ccn1: ChargeConservation (default)
    zc1: ZeroCharge (default)
    init1: init "Electric Potential 1" (default) | V = 1
    zc2: ZeroCharge "Homogeneous Dirichlet" (disabled) on boundaries 1-3, 8
    pot1: ElectricPotential "Higher plate" on boundaries 3 | V0 = +1
    pot2: ElectricPotential "Lower plate" on boundaries 2 | V0 = -1
    term3: Terminal "Higher terminal" (disabled) on boundaries 3 | TerminalType = Voltage; V0 = 1
    term2: Terminal "Lower terminal" (disabled) on boundaries 2 | TerminalType = Voltage; V0 = -1

Mesh
  mesh1 "Mesh 1" (physics-controlled)

Studies
  std1 "Study 1"
    stat: Stationary

Solver configurations
  sol1 "Solution 1" (study std1)
    v1: Variables "Dependent Variables 1"
    s1: Stationary "Stationary Solver 1"
      dDef: Direct
      fc1: FullyCoupled | linsolver = dDef

Datasets
  dset1: Solution | solution = sol1
  cln1: CutLine2D | data = dset1; genpoints = {{0.04, 0}, {0.04, 0.04}}

Derived values
  gev1: EvalGlobal "Electrostatic Energy"
    data = dset1
    table = tbl1
    expr = es.intWe
    unit = J
    descr = Total electric energy
  gev2: EvalGlobal "Capacity" | data = dset1; table = tbl1; expr = 0.5*es.intWe; unit = J

Tables
  tbl1: Table
    // Electrostatic Energy
    Total electric energy (J) | 0.5*es.intWe (J)
    4.68396e-11 | 2.34198e-11

Plots
  pg1: PlotGroup2D "Electric Potential" | data = dset1
    surf1: Surface | expr = V
    con1: Contour | expr = V
  pg2: PlotGroup2D "Electric field E" | data = dset1
    surf1: Surface | expr = es.normE; descr = Electric field norm
    con1: Contour | expr = es.normE; descr = Electric field norm