// COMSOL Multiphysics 5.5.0.359 model "TestCase4.mph"
// Outline of the model tree

Geometry
  geom1 "Solenoid actuator" (2D axisymmetric, length unit m)
    r1: Rectangle "Armature" | pos = {0, 0.025}; size = {0.03, 0.008}
    r2: Rectangle "Coil" | pos = {0.015, 0.008}; size = {0.01, 0.015}
    r3: Rectangle "Stator" | size = {0.03, 0.023}
    r4: Rectangle "Boundary-box" | size = {0.05, 0.05}
    r5: Rectangle "Stress-tensor box" | pos = {0, 0.024}; size = {0.031, 0.01}
    fin: Finalize "Form Union"

Materials
  mat1: Common "Air" on domains 2, 3, 5
    def "Basic"
      relpermeability = 1
      relpermittivity = 1
      electricconductivity = 1
  mat4: Common "Core" on domains 1, 4
    def "Basic"
      relpermeability = 2000
      electricconductivity = 1
      relpermittivity = 1

Physics
  mf: InductionCurrents "Magnetic Fields" on all domains
    dependent variable A = {Ar, Aphi, Az}
    ShapeProperty.order_magneticvectorpotential = 1
    al1: AmperesLaw "Ampère's Law 1" (default)
    axi1: AxialSymmetry (default)
    mi1: MagneticInsulation "Boundary condition" (default)
    init1: init "Initial Values 1" (default)
    coil1: Coil on domains 5 | ConductorModel = Multi; N = 2000; sigmaCoil = 1[S/m]
    ecd1: ExternalCurrentDensity (disabled) on domains 5 | Je = {0, 1.3333e7, 0}

Mesh
  mesh1 "Mesh 1" (physics-controlled)
    size: MeshSizeDefault | hauto = 1

Studies
  std1 "Study 1"
    stat: Stationary

Solver configurations
  sol1 "Solution 1" (study std1)
    v1: Variables "Dependent Variables 1"
    s1: Stationary "Stationary Solver 1"
      dDef: Direct
      fc1: FullyCoupled | linsolver = dDef

Datasets
  dset1: Solution | solution = sol1
  rev1: Revolve2D "Revolution 2D 1" | data = dset1; startangle = -90; revangle = 225
  cln1: CutLine2D "Air gap line" | data = dset1; genpoints = {{0, 0.024}, {0.04, 0.024}}

Derived values
  int1: IntLine "Maxwell stress tensor" on boundaries 6, 12, 22
    data = dset1
    table = tbl1
    expr = mf.dnTz
    unit = N
    descr = Maxwell downward surface stress tensor, z component
    intsurface = on

Tables
  tbl1: Table
    // Maxwell stress tensor
    Maxwell downward surface stress tensor, z component (N)
    277.352

Plots
  pg6: PlotGroup2D "Magnetic vector potential A'_phi" | data = dset1; dataisaxisym = on
    surf1: Surface | expr = Aphi*r
    con1: Contour | expr = mf.Aphi*r; levelrounding = off
  pg5: PlotGroup2D "Magnetic vector potential A_phi" | data = dset1; dataisaxisym = on
    surf1: Surface | expr = Aphi; descr = Magnetic vector potential, phi component
    con1: Contour | expr = mf.Aphi; levelrounding = off
  pg1: PlotGroup2D "Magnetic Flux Density Norm B" | data = dset1; dataisaxisym = on
    surf1: Surface | expr = mf.normB
    con1: Contour | expr = mf.Aphi*r; levelrounding = off
  pg2: PlotGroup3D "Magnetic Flux Density Norm B, Revolved Geometry (mf)" | data = rev1
    surf1: Surface | expr = mf.normB
    con1: Contour | expr = mf.Aphi*r; levelrounding = off
  pg3: PlotGroup1D "Magnetic vector potential A'_phi line" | data = cln1
    lngr1: LineGraph "Magnetic flux" | expr = mf.Aphi*r
  pg4: PlotGroup1D "Magnetic flux density B air-gap line" | data = cln1
    lngr1: LineGraph "Magnetic flux density norm"
      data = cln1
      expr = mf.normB
      descr = Magnetic flux density norm
      legends = Norm B
    lngr2: LineGraph "Magnetic flux density r-component"
      data = cln1
      expr = mf.Br
      descr = Magnetic flux density, r component
      autosolution = off
      legends = Br component
    lngr3: LineGraph "Magnetic flux density z-component"
      data = cln1
      expr = mf.Bz
      descr = Magnetic flux density, z component
      autosolution = off
      legends = Bz component

Exports
  plot4: Plot "A'_phi" | filename = /Volumes/ROD_16GB/test_case/TestCase4/comsol_A'_airgap.txt
  plot1: Plot "B norm" | filename = /Volumes/ROD_16GB/test_case/TestCase4/Bnorm_airgap.txt
  plot2: Plot "Br component" | filename = /Volumes/ROD_16GB/test_case/TestCase4/comsol_Br_airgap.txt
  plot3: Plot "Bz component" | filename = /Volumes/ROD_16GB/test_case/TestCase4/comsol_Bz_airgap.txt