// COMSOL Multiphysics 5.5.0.359 model "TestCase5.mph"
// Outline of the model tree

Geometry
  geom1 "Cylindrical inductor" (2D axisymmetric, length unit m)
    r1: Rectangle "Core" | pos = {0, -0.05}; size = {0.05, 0.1}
    r2: Rectangle "Coil" | pos = {0.06, -0.02}; size = {0.02, 0.04}
    r3: Rectangle "Bounding-box" | pos = {0, -0.15}; size = {0.2, 0.3}
    fin: Finalize "Form Union"

Materials
  mat2: Common "Air" on domains 1, 3
    def "Basic"
      relpermeability = 1
      relpermittivity = 1
      electricconductivity = 0
  mat1: Common "Core material" on domains 2
    def "Basic"
      relpermeability = 1
      relpermittivity = 1
      electricconductivity = 37.7e6

Physics
  mf: InductionCurrents "Magnetic Fields" on domains 1-3
    dependent variable A = {Ar, Aphi, Az}
    ShapeProperty.order_magneticvectorpotential = 2
    EquationForm.form = Automatic
    al1: AmperesLaw "Ampère's Law 1" (default)
    axi1: AxialSymmetry (default)
    mi1: MagneticInsulation (default)
    init1: init "Initial Values 1" (default)
    ecd1: ExternalCurrentDensity "External Current Density J_phi" on domains 3 | Je = {0, 5e6, 0}

Mesh
  mesh1 "Mesh 1" (physics-controlled)
    size: MeshSizeDefault | hauto = 1

Studies
  std1 "Study 1"
    freq: Frequency "Frequency Domain" | plist = 100

Solver configurations
  sol1 "Solution 1" (study std1)
    v1: Variables "Dependent Variables 1"
    s1: Stationary "Stationary Solver 1"
      dDef: Direct
      p1: Parametric | pname = freq; plistarr = 100; punit = Hz; pcontinuationmode = no
      fc1: FullyCoupled | linsolver = dDef

Datasets
  dset1: Solution | solution = sol1
  rev1: Revolve2D "Revolution 2D 1" | data = dset1; startangle = -90; revangle = 225
  cln1: CutLine2D "Core line" | data = dset1; genpoints = {{0, 0}, {0.05, 0}}

Derived values
  int1: IntSurface "Joule losses" on domains 2
    data = dset1
    table = tbl1
    expr = mf.Qrh
    unit = W
    descr = Volumetric loss density, electric
    intvolume = on

Tables
  tbl1: Table "Joule losse core"
    // Joule losses
    freq (Hz) | Volumetric loss density, electric (W)
    100 | 54.5038

Plots
  pg3: PlotGroup2D "Magnetic vector potential A'_phi" | data = dset1; dataisaxisym = on
    con1: Contour | expr = mf.Aphi*r
  pg1: PlotGroup2D "Magnetic Flux Density Norm (mf)" | data = dset1; dataisaxisym = on
    surf1: Surface | expr = mf.normB
    con1: Contour | expr = mf.Aphi*r; levelrounding = off
  pg2: PlotGroup3D "Magnetic Flux Density Norm, Revolved Geometry (mf)" | data = rev1
    surf1: Surface | expr = mf.normB
    con1: Contour | expr = mf.Aphi*r; levelrounding = off
  pg4: PlotGroup2D "Electric field norm E" | data = dset1; dataisaxisym = on
    con1: Contour | expr = mf.normE; descr = Electric field norm
  pg5: PlotGroup1D "Magnetic vector potential A'_theta core line" | data = cln1
    lngr1: LineGraph "Magnitude value" | data = cln1; expr = abs(mf.Aphi*r); descr = Absolute value; autosolution = off
    lngr2: LineGraph "Real value" | data = cln1; expr = real(mf.Aphi*r); descr = Real value; autosolution = off
    lngr3: LineGraph "Imaginary value" | data = cln1; expr = imag(mf.Aphi*r); descr = Imaginary value; autosolution = off
  pg6: PlotGroup1D "Magnetic flux density B norm in core line" | data = cln1
    lngr2: LineGraph "Magnitude value" | data = cln1; expr = mf.normB; descr = Norm value; autosolution = off
  pg7: PlotGroup1D "Magnetic flux density Br-componet in core line" | data = cln1
    lngr2: LineGraph "Magnitude value" | data = cln1; expr = abs(mf.Br); descr = Magnitude value; autosolution = off
    lngr3: LineGraph "Real value" | data = cln1; expr = real(mf.Br); descr = Real value; autosolution = off
    lngr4: LineGraph "Imaginary value" | data = cln1; expr = imag(mf.Br); descr = Imaginary value; autosolution = off
  pg9: PlotGroup1D "Magnetic flux density Bz-componet in core line" | data = cln1
    lngr2: LineGraph "Magnitude value" | data = cln1; expr = abs(mf.Bz); descr = Magnitude value; autosolution = off
    lngr3: LineGraph "Real value" | data = cln1; expr = real(mf.Bz); descr = Real value; autosolution = off
    lngr4: LineGraph "Imaginary value" | data = cln1; expr = imag(mf.Bz); descr = Imaginary value; autosolution = off

Exports
  data1: Data "Aphi*r core line"
    data = cln1
    expr = {abs(mf.Aphi*r), real(mf.Aphi*r), imag(mf.Aphi*r)}
    unit = {Wb, Wb, Wb}
    descr = {Magnitude value, Real value, Imaginary value}
    filename = /Volumes/ROD_16GB/test_case/TestCase5/comsol_Atheta_coreline.txt
    sort = on
  plot2: Plot "B norm core line" | filename = /Volumes/ROD_16GB/test_case/TestCase5/comsol_Bnorm_coreline.txt; sort = on
  data2: Data "Br componet core line"
    data = cln1
    expr = {abs(mf.Br), real(mf.Br), imag(mf.Br)}
    unit = {T, T, T}
    descr = {Magnitude value, Real value, Imaginary value}
    filename = /Volumes/ROD_16GB/test_case/TestCase5/comsol_Br_coreline.txt
    sort = on
  data3: Data "Bz component core line"
    data = cln1
    expr = {abs(mf.Bz), real(mf.Bz), imag(mf.Bz)}
    unit = {T, T, T}
    descr = {Magnitude value, Real value, Imaginary value}
    filename = /Volumes/ROD_16GB/test_case/TestCase5/comsol_Bz_coreline.txt
    sort = on