// COMSOL Multiphysics 5.5.0.359 model "TestCase6_static.mph"
// Outline of the model tree

Geometry
  geom1 "Billet" (2D axisymmetric, length unit m)
    r1: Rectangle | size = {0.05, 0.1}
    fin: Finalize "Form Union"

Materials
  mat1: Common "Material 1" on all domains
    def "Basic"
      density = 2700
      heatcapacity = 900
      thermalconductivity = 237

Physics
  ht: HeatTransfer "Heat Transfer in Solids" on all domains
    dependent variable T
    ShapeProperty.order_temperature = 1
    EquationForm.form = Automatic
    solid1: SolidHeatTransferModel "Solid 1" (default)
    init1: init "Initial Values 1" (default) | Tinit = 303.15[K]
    axi1: AxialSymmetry (default)
    ins1: ThermalInsulation (default)
    hf1: HeatFluxBoundary "Heat Flux convective" on boundaries 2-4
      HeatFluxType = ConvectiveHeatFlux
      h = 15
      Text = 303.15[K]
      materialType = from_mat
    hs1: HeatSource "Heat Source G" on domains 1 | Q0 = 1e6; materialType = solid

Mesh
  mesh1 "Mesh 1" (physics-controlled)
    size: MeshSizeDefault | hauto = 1

Studies
  std1 "Study 1"
    stat: Stationary

Solver configurations
  sol1 "Solution 1" (study std1)
    v1: Variables "Dependent Variables 1"
    s1: Stationary "Stationary Solver 1"
      fc1: FullyCoupled | linsolver = d1; initstep = 0.01; minstep = 1.0E-6; maxiter = 50
      d1: Direct "Direct, Heat Transfer Variables (ht)" | linsolver = pardiso; pivotperturb = 1.0E-13

Datasets
  dset1: Solution | solution = sol1
  rev1: Revolve2D "Revolution 2D" | data = dset1; startangle = -90; revangle = 225
  cln1: CutLine2D "Middle billet" | data = dset1; genpoints = {{0, 0.05}, {0.05, 0.05}}

Plots
  pg1: PlotGroup3D "Temperature, 3D (ht)" | data = rev1
    surf1: Surface | expr = T
    arwl1: ArrowLine | revcoordsys = cylindrical; expr = {ht.dfluxr, ht.dfluxphi, ht.dfluxz}
  pg2: PlotGroup2D "Isothermal Contours (ht)" | data = dset1; dataisaxisym = on
    con1: Contour | expr = T; levelrounding = off
  pg3: PlotGroup1D "1D Plot Group 3" | data = dset1
    lngr1: LineGraph "Temperature T in the billet's middle line" | data = cln1; expr = T

Exports
  plot1: Plot "Temperature midlle line" | filename = /Volumes/ROD_16GB/test_case/TestCase6/comsol_T_middleline.txt